*Heading
** Job name: Springs Model name: Model-1
** Generated by: Abaqus/CAE 6.14-2
*Preprint, echo=NO, model=NO, history=NO, contact=NO
**
** PARTS
**
*Part, name="Concrete -1"
*Node
      1,  0.200000003,           0., 0.0599999987
      2,           0.,           0., 0.0599999987
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*Element, type=C3D8R
  1,   97,  392, 1354,  336,    1,   26,  300,   47
  2,  392,  393, 1355, 1354,   26,   27,  301,  300
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*Node
   2633,  0.200000003,  0.278441638, 0.0599999987
   2634,  0.200000003,  0.265182525, 0.0599999987
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*Nset, nset=Set-1, generate
    1,  2632,     1
*Elset, elset=Set-1, generate
    1,  1992,     1
*Nset, nset="Attachment Points-1-Set-1", generate
 2633,  2655,     1
** Section: Concrete
*Solid Section, elset=Set-1, material=Concrete
,
*End Part
**
*Part, name="Concrete -2"
*Node
      1, -0.200000003,           0., 0.0599999987
      2,           0.,           0., 0.0599999987
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*Element, type=C3D8R
  1,   92,  369, 1354,  313,    1,   21,  277,   42
  2,  369,  370, 1355, 1354,   21,   22,  278,  277
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*Node
   2633, -0.200000003, -0.278441638, 0.0599999987
   2634, -0.200000003, -0.265182525, 0.0599999987
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*Nset, nset=Set-1, generate
    1,  2632,     1
*Elset, elset=Set-1, generate
    1,  1992,     1
*Nset, nset="Attachment Points-1-Set-1", generate
 2633,  2655,     1
** Section: Concrete
*Solid Section, elset=Set-1, material=Concrete
,
*End Part
**
**
** ASSEMBLY
**
*Assembly, name=Assembly
**
*Instance, name="Concrete -2-1", part="Concrete -2"
*End Instance
**
*Instance, name="Concrete -1-2", part="Concrete -1"
      -0.401,    -0.291701,           0.
*End Instance
**
*Nset, nset=Deformation, instance="Concrete -1-2"
 1,
*Nset, nset=Displacement, instance="Concrete -1-2"
 8,
*Nset, nset=Load2, instance="Concrete -1-2"
   13,   14,   15,   20,   21,   22
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*Elset, elset=Load2, instance="Concrete -1-2"
  902,  904,  906,  908,  917,  920
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*Nset, nset=Set-1, instance="Concrete -2-1"
   13,   14,   17,   19,  182,  183
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*Elset, elset=Set-1, instance="Concrete -2-1"
  907,  917,  918,  919,  920,  921
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*Nset, nset=Set-2, instance="Concrete -2-1"
   13,   14,   17,   19,  182,  183
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*Elset, elset=Set-2, instance="Concrete -2-1"
  907,  917,  918,  919,  920,  921
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*Nset, nset=Set-3, instance="Concrete -2-1"
   13,   14,   17,   19,  182,  183
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*Elset, elset=Set-3, instance="Concrete -2-1"
  907,  917,  918,  919,  920,  921
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*Nset, nset=Set-6, instance="Concrete -2-1"
   13,   14,   17,   19,  182,  183
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*Elset, elset=Set-6, instance="Concrete -2-1"
  907,  917,  918,  919,  920,  921
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*Nset, nset=Set-58, instance="Concrete -2-1"
    2,    3,    5,    6,   10,   12
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*Elset, elset=Set-58, instance="Concrete -2-1"
   10,   20,   30,   40,   50,   60
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*Nset, nset=Set-59, instance="Concrete -1-2"
    2,    3,    5,    6,   10,   12
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*Nset, nset=Set-64, instance="Concrete -1-2"
 22,
*Elset, elset=_Surf-1_S5, internal, instance="Concrete -1-2"
  902,  917,  920,  924,  936,  953
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*Elset, elset=_Surf-1_S3, internal, instance="Concrete -1-2"
  904,  906,  908,  923,  944,  979
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*Elset, elset=_Surf-1_S4, internal, instance="Concrete -1-2", generate
  931,  1841,   182
*Elset, elset=_Surf-1_S6, internal, instance="Concrete -1-2", generate
  935,  1845,   182
*Surface, type=ELEMENT, name=Surf-1
_Surf-1_S5, S5
_Surf-1_S3, S3
_Surf-1_S4, S4
_Surf-1_S6, S6
*Orientation, name="Datum csys-1"
          1.,           0.,           0.,           0.,           1.,           0.
1, 0.
*Spring, elset=springs-spring, orientation="Datum csys-1"
2, 2
50.
*Element, type=Spring2, elset=springs-spring
1, "Concrete -1-2".2653, "Concrete -2-1".2633
2, "Concrete -1-2".2652, "Concrete -2-1".2634
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*End Assembly
*Amplitude, name=Amp-1
             0.,              0.,             36.,              1.
*Amplitude, name=Amp-2, definition=SMOOTH STEP
             0.,              0.,            180.,             0.5,            360.,              1.
**
*ENRICHMENT, TYPE=PROPAGATION CRACK, ELSET=ENRICHED,
NAME=ENRICHMENT, INTERACTION=INTERACTION

** MATERIALS
**
*Material, name=Concrete
*Density
2400.,
*Elastic
 3.3e+10, 0.2
**
** BOUNDARY CONDITIONS
**
** Name: BC-1 Type: Displacement/Rotation
*Boundary
Set-58, 1, 1
** Name: BC-2 Type: Displacement/Rotation
*Boundary
Set-6, 2, 2
** Name: BC-3 Type: Displacement/Rotation
*Boundary
Set-59, 1, 1
Set-59, 3, 3
** ----------------------------------------------------------------
**
** STEP: Step-1
**
*Step, name=Step-1, nlgeom=YES, inc=10000
*Static
0.01, 360., 1e-15, 360.
**
** LOADS
**
** Name: Load-1   Type: Concentrated force
*Cload, amplitude=Amp-1
Set-64, 2, -200000.
**
** CONTROLS
**
*Controls, reset
*Controls, parameters=time incrementation
, , , , , , , 20, , ,
**
** OUTPUT REQUESTS
**
*Restart, write, frequency=0
**
** FIELD OUTPUT: F-Output-1
**
*Output, field, variable=PRESELECT
**
** HISTORY OUTPUT: H-Output-1
**
*Output, history, variable=PRESELECT
*CONTOUR INTEGRAL, CRACK NAME=ENRICHMENT, XFEM
*End Step
